# Имеется волоконно-оптическая линия связи.
# Проведено 24 измерения входного и выходного напряжения.
# Необходимо оценить вид зависимости амплитуды выходного сигнала от амплитуды входного сигнала и возможный интервал выходного напряжения.
# Построить график зависимости выходного напряжения от входного.
# Оценить коэффициенты линейной завсисмости  спомощью функций MathCad и матричным способом.
# Оценку провести  с одинковой диспесией входных данных и с погрешностью 10%. ( взвешенный метод МНК)
# Предложить нелинейную функцию , которая может описать зависимость выходного напряжения от входного.
# Оценить значения параметров в этой функции. Построить графики оцененных значений и экспериментальных значений (все на одном графике).
# Число измерений:
n := 24
# Входное напряжение: | Выходное напряжение:
Un := [-600; -550; -500; -460; -420; -367; -315; -265; -214; -160; -110; -54; 54; 110; 160; 212; 261; 309; 359; 417; 460; 500; 550; 600]
Uk := [-408; -389; -363; -333; -312; -271; -244; -206; -170; -127; -90; -42; 41; 86; 118; 159; 193; 227; 260; 290; 323; 348; 377; 401]
