# Обработка данных по наработке хронографического электронно-оптического преобразователя ЭОП  1429
# Падение световой чувствительности хронографического ЭОП со временем наработки
# значения световой чувствительности (мА/лм), соответствующие времени наработки,
# значения фиксировались один раз, погрешность измерения: погрешность округления измеряемого значения установкой iRad
# δ=0.5
# время наработки,
# в часах, точность  измерения δ=0.3 часа
T := [0.00; 17.75; 38.08; 59.08; 82.42; 110.33; 135.58; 176.25]
Ph1 := [169; 163; 161; 151; 142; 137; 133; 130]
Задание
# 1. Представить экспериментальный график зависимости световой чувствительности от времени наработки.
# 2. Предложить тип зависимости и оценить параметры заисимости
# 3. Представить график аппрокимирующей фунции совместно с эксперментальными данными.
# 4. Обьяснить с физической точки зрения приемлимость/неприемлимость полученной аппроксимации
