# Проведены исследования распределения потенциала в системе с двумя электродами: катодом и анодом.
# Получены распределения потенциала в межэлектродном промежутке в зависимости от расстояния от катода.
#
# X - потенциал при отсутствии газового разряда между электродами
# Y - потенциал в случае горения газового разряда между электродами
# T - расстояние от катода на котором получены соответствующие значения потенциала
#
# Из теории известно, что в отсутствии газового разряда между электродами зависимость распределения потенциала между электродами носит квадратичный характер. Так же известно, что при зажигании газового разряда характер зависимости потенциала от расстояния меняется.
#
# Задание:
#
# 1) Проверить соответствие распределения потенциала в отсутствии газового разряда (X) на наличие квадратичной зависимости от расстояния (T).
#
# 2) Определить какой характер зависимости от расстояния (T) носит распределение потенциала при наличии газового разряда (Y) между электродами.
X := [12.6; 12.4; 14.0; 17.1; 20.2; 25.5; 37.0; 45.7; 63.3; 83.0; 98.6]
Y := [107.3; 20.7; 5.1; 5.2; 10.4; 17.0; 27.5; 42.1; 58.0; 77.2; 98.8]
T := [0; 5; 10; 15; 20; 25; 30; 35; 40; 45; 50]
k := 11
